# Input file for running an NVT Equilibration in LAMMPS, Filename = in.P3HTLeeE250_150

units real
atom_style molecular
boundary p p p
bond_style harmonic
pair_style lj/cut 10.0
angle_style harmonic
dihedral_style multi/harmonic
special_bonds lj 0 1 1
improper_style none
kspace_style none
read_data data.rantest
thermo_style custom step temp press ke pe etotal density
dump 1 all custom 200 testran.lammpstrj id type mol xs ys zs vx vy vz
neighbor 10.0 bin
neigh_modify every 1 delay 0 one 2000
fix 1 all nve/limit 0.5
velocity all create 100.000000 1223
fix 2 all temp/berendsen 100.000000 100.000000 15
timestep 1
thermo 100
run 10000
unfix 1
unfix 2
write_restart restart.rantest
