# created by CMLParser

units real
atom_style full
boundary p p p
bond_style harmonic
dielectric 9.8
pair_style lj/cut/coul/long 20.0
angle_style harmonic
dihedral_style opls
special_bonds lj 0 1 1
improper_style none
kspace_style ewald 10
read_data data.rewrite2
thermo_style custom step temp press ke pe etotal density
dump 1 all custom 200 rewriteout.lammpstrj id type mol xs ys zs vx vy vz
neighbor 10.0 bin
neigh_modify every 1 delay 0 one 10000
fix 1 all npt temp 100 100 100 iso 0.0 1 1000 drag 2
fix 2 all momentum 1 linear 1 1 1
velocity all create 100.00000 1223
timestep 1
thermo 100
run 10000
unfix 1
unfix 2
write_restart restart.rewriteout


replicate 10 10 10
undump 1
fix 1 all npt temp 100 300 100 iso 10 1 1000 drag 2
fix 2 all momentum 1 linear 1 1 1
velocity all create 100.00000 1223
dump 2 all custom 1000 rewriteout_final.lammpstrj id type mol xs ys zs vx vy vz
run 500000
write_restart restart.rewriteout_final
unfix 1
unfix 2
